New Capacitor.p2uc6 bus1=p2udt1172 phases=3 Kv=12.47 conn=Wye Kvar=300.0

New CapControl.p2uc6 Capacitor=p2uc6 Element=Line.padswitch(r:p2udt1172-p2udt5648)p2u_35577 Terminal=1 delay=100.0 Type=voltage Vmin=120.5 Vmax=125.0 Ptratio=59.99631547328862 Ctratio=100.0
